# OpenSim document version 40500
ScaleTool SUBJ32-scaled:
  mass: 83 [kg]
  height: -1
  age: -1
  ModelScaler:
    apply: true
    scaling_order: measurements
    marker_file: ../../1_C3D_to_TRC/SUBJ32/SUBJ32_0_static_RCNL2025.trc
    time_range: 0.11 1.03
    preserve_mass_distribution: true
    MeasurementSet:
      Measurement Femur: apply=true
        MarkerPair: markers=(L_Asis L_Knee_Lateral)
        MarkerPair: markers=(R_Asis R_Knee_Lateral)
        BodyScale femur_r: axes=(X Y Z)
        BodyScale femur_l: axes=(X Y Z)
      Measurement Tibia: apply=true
        MarkerPair: markers=(L_Knee_Lateral L_Ankle_Lateral)
        MarkerPair: markers=(R_Knee_Lateral R_Ankle_Lateral)
        BodyScale tibia_r: axes=(X Y Z)
        BodyScale tibia_l: axes=(X Y Z)
      Measurement Foot: apply=true
        MarkerPair: markers=(L_Heel L_Toe)
        MarkerPair: markers=(R_Heel R_Toe)
        BodyScale calcn_r: axes=(X Y Z)
        BodyScale calcn_l: axes=(X Y Z)
      Measurement Pelvis: apply=true
        MarkerPair: markers=(R_Asis L_Asis)
        BodyScale pelvis: axes=(X Y Z)
      Measurement Torso: apply=true
        MarkerPair: markers=(C7 Sacral)
        BodyScale torso: axes=(X Y Z)
      Measurement Humerus: apply=true
        MarkerPair: markers=(R_Shoulder R_Elbow)
        MarkerPair: markers=(L_Shoulder L_Elbow)
        BodyScale humerus_r: axes=(X Y Z)
        BodyScale humerus_l: axes=(X Y Z)
      Measurement Radius: apply=true
        MarkerPair: markers=(R_Elbow R_Wrist)
        MarkerPair: markers=(L_Elbow L_Wrist)
        BodyScale radius_r: axes=(X Y Z)
        BodyScale radius_l: axes=(X Y Z)
  MarkerPlacer:
    apply: true
    marker_file: ../../1_C3D_to_TRC/SUBJ32/SUBJ32_0_static_RCNL2025.trc
    time_range: 0.11 1.03
    max_marker_movement: -1
    IKTaskSet:
      IKMarkerTask R_Shoulder: apply=true weight=3
      IKMarkerTask L_Shoulder: apply=true weight=3
      IKMarkerTask C7: apply=true weight=5
      IKMarkerTask J_Notch: apply=true weight=5
      IKMarkerTask R_Elbow: apply=true weight=2
      IKMarkerTask L_Elbow: apply=true weight=2
      IKMarkerTask R_Wrist: apply=true weight=2
      IKMarkerTask L_Wrist: apply=true weight=2
      IKMarkerTask R_Asis: apply=true weight=20
      IKMarkerTask L_Asis: apply=true weight=20
      IKMarkerTask R_Psis: apply=false weight=1
      IKMarkerTask L_Psis: apply=false weight=1
      IKMarkerTask Sacral: apply=true weight=20
      IKMarkerTask Lumbar: apply=false weight=1
      IKMarkerTask Thoracic: apply=true weight=5
      IKMarkerTask Sternum: apply=true weight=5
      IKMarkerTask R_Thigh_Superior: apply=false weight=1
      IKMarkerTask R_Thigh_Inferior: apply=false weight=1
      IKMarkerTask R_Thigh_Lateral: apply=true weight=5
      IKMarkerTask R_Knee_Lateral: apply=true weight=10
      IKMarkerTask R_Knee_Medial: apply=false weight=1
      IKMarkerTask R_Patella: apply=false weight=1
      IKMarkerTask R_Shank_Superior: apply=false weight=1
      IKMarkerTask R_Shank_Inferior: apply=false weight=1
      IKMarkerTask R_Shank_Lateral: apply=true weight=5
      IKMarkerTask R_Ankle_Lateral: apply=true weight=10
      IKMarkerTask R_Ankle_Medial: apply=false weight=1
      IKMarkerTask R_Heel: apply=true weight=3
      IKMarkerTask R_Toe: apply=true weight=3
      IKMarkerTask R_Toe_Lateral: apply=false weight=1
      IKMarkerTask R_Toe_Medial: apply=false weight=1
      IKMarkerTask R_Midfoot_Superior: apply=false weight=1
      IKMarkerTask R_Midfoot_Lateral: apply=false weight=1
      IKMarkerTask L_Thigh_Superior: apply=false weight=1
      IKMarkerTask L_Thigh_Inferior: apply=false weight=1
      IKMarkerTask L_Thigh_Lateral: apply=true weight=5
      IKMarkerTask L_Knee_Lateral: apply=true weight=10
      IKMarkerTask L_Knee_Medial: apply=false weight=1
      IKMarkerTask L_Patella: apply=false weight=1
      IKMarkerTask L_Shank_Superior: apply=false weight=1
      IKMarkerTask L_Shank_Inferior: apply=false weight=1
      IKMarkerTask L_Shank_Lateral: apply=true weight=5
      IKMarkerTask L_Ankle_Lateral: apply=true weight=10
      IKMarkerTask L_Ankle_Medial: apply=false weight=1
      IKMarkerTask L_Heel: apply=true weight=3
      IKMarkerTask L_Toe: apply=true weight=3
      IKMarkerTask L_Toe_Lateral: apply=false weight=1
      IKMarkerTask L_Toe_Medial: apply=false weight=1
      IKMarkerTask L_Midfoot_Superior: apply=false weight=1
      IKMarkerTask L_Midfoot_Lateral: apply=false weight=1
