# OpenSim document version 40500
InverseKinematicsTool:
  time_range: 0.235 3.895
  output_motion_file: C:/Users/lucia/Desktop/TFG/1_Preprocessing_for_JMP/2_IK_(.mot)/Stroke_IK_out/TVC41/Walk_2/TVC41_Walk_2_IK.mot
  marker_file: C:/Users/lucia/Desktop/TFG/1_Preprocessing_for_JMP/2_IK_(.mot)/Stroke/TVC41/Walk_2/TVC_41_BWA_04_walk_RCNL2025.trc
  IKTaskSet:
    IKMarkerTask R_Shoulder: apply=true weight=3
    IKMarkerTask L_Shoulder: apply=true weight=3
    IKMarkerTask C7: apply=true weight=5
    IKMarkerTask J_Notch: apply=true weight=5
    IKMarkerTask R_Elbow: apply=true weight=2
    IKMarkerTask L_Elbow: apply=true weight=2
    IKMarkerTask R_Wrist: apply=true weight=2
    IKMarkerTask L_Wrist: apply=true weight=2
    IKMarkerTask R_Asis: apply=true weight=20
    IKMarkerTask L_Asis: apply=true weight=20
    IKMarkerTask R_Psis: apply=true weight=5
    IKMarkerTask L_Psis: apply=true weight=5
    IKMarkerTask Sacral: apply=true weight=5
    IKMarkerTask Thoracic: apply=true weight=5
    IKMarkerTask Sternum: apply=true weight=5
    IKMarkerTask R_Thigh_Lateral: apply=true weight=5
    IKMarkerTask R_Knee_Lateral: apply=true weight=10
    IKMarkerTask R_Shank_Lateral: apply=true weight=5
    IKMarkerTask R_Ankle_Lateral: apply=true weight=10
    IKMarkerTask R_Heel: apply=true weight=5
    IKMarkerTask R_Toe: apply=true weight=5
    IKMarkerTask L_Thigh_Lateral: apply=true weight=5
    IKMarkerTask L_Knee_Lateral: apply=true weight=10
    IKMarkerTask L_Shank_Lateral: apply=true weight=5
    IKMarkerTask L_Ankle_Lateral: apply=true weight=10
    IKMarkerTask L_Heel: apply=true weight=5
    IKMarkerTask L_Toe: apply=true weight=5
